<?xml version="5" ?>
<Node name="IMRT" gravity="0 -9.81 0" dt="0.04">
  <VisualStyle displayFlags="showVisual showBehavior
               showCollision hideOptions showMapping" />
  <DefaultPipeline name="DefaultCollisionPipeline" verbose="0" draw="0" depth="15" />
  <BruteForceDetection name="ForceDetection" />
  <MinProximityIntersection name="Proximity" alarmDistance="0.02" contactDistance="0.02" />
  <CollisionResponse name="Response" response="default" />
  <RequiredPlugin name='SofaOpenglVisual'/> <!-- PLUGINIZED since SOFA v19.06 -->
  <LightManager name="lightManager"  listening="1" />
  <!-- <SpotLight name="light1" color="0 0 1" position="0.5 -70 60" cutoff="125" exponent="1" /> -->
  <!-- <PositionalLight name="lightpos" color="0.5 .7 0.2" attenuation="0.1" position="0.5 -1.7 60" /> -->
  <!-- <DirectionalLight name="lightdir" color="1 1 1" direction=".5 .5 .65" /> -->
  <!-- <VisualManagerPass name="visualManagerPass0"  tags="Visu"  listening="1" /> -->  <!-- PLUGINIZED since SOFA v19.06 -->
	<DefaultContactManager name="DefaultResponse"  response="FrictionContact" />
  <!-- <CompositingVisualLoop name="compositingVisualLoop3" /> -->  <!-- PLUGINIZED since SOFA v19.06 -->

  <Node name="IABChains">
    <!-- Note that dy is now dz due to the -90 of cushions and human rotation -->
    <Node name="BaseChain">
      <include name="RearHeadLeft" href="sphere.scn" dx="-15" dy="190" dz="40" />
      <include name="RearHeadRight" href="sphere.scn" dx="15" dy="190" dz="40" />
      <include name="NeckLeft" href="sphere.scn" dx="-14" dy="190" dz="62" />
      <include name="NeckRight" href="sphere.scn" dx="14" dy="190" dz="62" />
    </Node>

    <Node name="SideChains">
      <include name="TempleLeft" href="sphere.scn" dx="-16" dy="210" dz="40" />
      <include name="TempleRight" href="sphere.scn" dx="16" dy="210" dz="40"  />
      <include name="ChinLeft" href="sphere.scn" dx="-14" dy="210" dz="62"/>
      <include name="ChinRight" href="sphere.scn" dx="14" dy="210" dz="62"/>
    </Node>
  </Node>

    <Node name="Human">
      <include href="human.scn" dy="195" dz="90" scale="40" color="brown" rx="-90" />
    </Node>

    <Node name="Linac_Collimator" >
      <include href="linac.scn" name="linac-and-collimator" color="brown" />
    </Node>

  <!-- TODO: This is not yet revealed in ogl -->
  <Node name="SpringConnections">
    <include name="necks-connector" href="springs.scn" scale="5" dx="-13" dy="30" dz="-10" />
  </Node>

</Node>
