<?xml version="1.0" ?>
<Node name="Stereotactic Radiosurgery" gravity="0 -1000 0" dt="0.04">
  <APIVersion level="19.06" />
  <RequiredPlugin name="SofaOpenglVisual"/>
  <RequiredPlugin pluginName="CImgPlugin"/>
  <RequiredPlugin name="IAB" pluginName="IAB"/>
	<VisualStyle displayFlags="showVisual showBehavior showCollision hideOptions showMapping showForceFields" />
  <LightManager ambient="4 8.5 10"/>
  <LCPConstraintSolver tolerance="1e-3" maxIt="1000" initial_guess="false" build_lcp="false"  printLog="0" mu="0.2"/>
  <!-- <FreeMotionAnimationLoop /> -->
  <!-- See https://www.sofa-framework.org/community/doc/using-sofa/components/animationloop/defaultanimationloop/ -->
  <DefaultAnimationLoop />

  <DefaultPipeline verbose="1" draw="1" depth="15" />
  <BruteForceDetection name="ForceDetection" />
  <MinProximityIntersection name="Proximity" alarmDistance="0.02" contactDistance="0.02" />

  <LightManager/>
	<DefaultContactManager name="Response"  response="FrictionContact" />

  <Node name="Patient">
    <include href="scene_comps/patients/patient_rigid_whole.scn" translation="-300 25 -50" scale="250" rx="-90" ry="-90" color="grey" />

    <Node name="IABChains">
      <!-- Making chains children of patient since they control head and neck motion -->
      <Node name="BaseChain">
        <include name="SkullLeft" href="scene_comps/IABs/sphere.scn"  Ri="10" Ro="15" ri="13"
                C1="1.1e4" C2="2.2e4" dx="20" dy="-50" dz="55" color="magenta" scale="1.8"/>
        <include name="SkullRight" href="scene_comps/IABs/sphere.scn"  Ri="10" Ro="15" ri="13"
                C1="1.1e4" C2="2.2e4" dx="20" dy="-50" dz="-115" color="magenta" scale="1.8"/>
        <include name="NeckLeft" href="scene_comps/IABs/sphere.scn"  Ri="10" Ro="15" ri="13"
                C1="1.1e4" C2="2.2e4" dx="-135" dy="-50" dz="55" color="magenta" scale="1.8"/>
        <include name="NeckRight" href="scene_comps/IABs/sphere.scn"  Ri="10" Ro="15" ri="13"
                C1="1.1e4" C2="2.2e4" dx="-135" dy="-50" dz="-115" color="magenta" scale="1.8"/>
      </Node>

      <Node name="SideChains">
        <include name="ForeLeft" href="scene_comps/IABs/sphere.scn" Ri="10" Ro="15" ri="13"
                C1="1.1e4" C2="2.2e4" dx="20" dy="100" dz="95" color="0.3 0.65 0.6" scale="1.8"/>
        <include name="ForeRight" href="scene_comps/IABs/sphere.scn" Ri="10" Ro="15" ri="13"
                C1="1.1e4" C2="2.2e4" dx="20" dy="100" dz="-180" color="0.3 0.65 0.6" scale="1.8"/>
        <include name="ChinRight" href="scene_comps/IABs/sphere.scn" Ri="10" Ro="15" ri="13"
                C1="1.1e4" C2="2.2e4" dx="-150" dy="100" dz="75" color="0.3 0.65 0.6" scale="1.8"/>
        <include name="ChinLeft" href="scene_comps/IABs/sphere.scn" Ri="10" Ro="15" ri="13"
                C1="1.1e4" C2="2.2e4" dx="-150" dy="100" dz="-160" color="0.3 0.65 0.6" scale="1.8"/>
      </Node>

    </Node>
  </Node>

		<Node name="FlexiHolders">
      <!-- <include name="FlexiBase" href="scene_comps/supports/flexi_base.scn"
              dx="-20" dy="-110" dz="-60" rx="90" scale="80"/> -->
      <include name="FlexiRight" href="scene_comps/supports/flexi_hz.scn"
              dx="-20" dy="30" dz="150" rz="90" scale="100"/>
      <include name="FlexiLeft" href="scene_comps/supports/flexi_hz.scn"
              dx="-20" dy="30" dz="-280" rz="90" scale="100" />
    </Node>

    <Node name="GantryCouch" >
      <include href="scene_comps/gantry/gantry.scn" name="gantry" color="0.8549 0.8235 0.6431" dy="50" dz="20" scale=".91" />
      <include href="scene_comps/gantry/turntable.scn" name="turntable" color="0.8549 0.8235 0.6431"   dy="50" dz="20" scale=".91" />
      <include href="scene_comps/couch/couch_foot.scn" name="couch_foot" color="0.3 0.6 0.7" dy="50" dz="20" rx="90" rz="180"  scale=".91" />
      <include href="scene_comps/couch/couch_latbase.scn" name="couch_latbase" color="magenta" dy="50" dz="20" rx="90" rz="180"  scale=".91" /> <!-- Dark Grey Color -->
      <include href="scene_comps/couch/couch_main.scn" name="couch_main" color="cyan" dy="50" dz="20" scale=".91" /> <!-- Dark Grey Color -->
      <include href="scene_comps/couch/couch_lnginner.scn" name="couch_lnginner" color="cyan" dy="50" dz="20" scale=".91" /> <!-- Dark Grey Color -->
      <include href="scene_comps/couch/couch_lngmid.scn" name="couch_mid" color="cyan" dy="50" dz="20"  scale=".91" /> <!-- Dark Grey Color -->
      <include href="scene_comps/couch/couch_top.scn" name="couch_top" color="cyan" dy="50" dz="20" scale=".91" /> <!-- Dark Grey Color -->
    </Node>

    <Node name="HeadCouchSupport">
      <include href="scene_comps/supports/headsupport.scn" name="head_support" color="0.3 0.6 0.7" dy="50" dz="20" rx="90" scale="1" />
      <include href="scene_comps/supports/couch_pad.scn" name="couch_pad" color="0.3 0.6 0.7" dy="50" dz="20" rx="90" scale="1" />
    </Node>

    <Node name="Cushions">
      <include href="scene_comps/supports/cushion.scn" name="Cushion-1" />
      <include href="scene_comps/supports/cushion.scn" name="Cushion-2" translation="0 -220 0"/>
      <include href="scene_comps/supports/cushion.scn" name="Cushion-3" translation="0 -330 0"/>
      <include href="scene_comps/supports/cushion.scn" name="Cushion-4" translation="0 -440 0"/>
      <include href="scene_comps/supports/cushion.scn" name="Cushion-5" translation="0 -550 0"/>
    </Node>

  <!-- TODO: This is not yet revealed in ogl -->
  <Node name="SpringConnections">
    <include name="necks-connector" href="scene_comps/supports/springs.scn" scale="5" dx="-13" dy="30" dz="-10" />
  </Node>

</Node>
